/COM,ANSYS MEDIA REL. 150 (11/8/2013) REF. VERIF. MANUAL: REL. 150
/VERIFY,VM45
/PREP7
/TITLE, VM45, NATURAL FREQUENCY OF A SPRING-MASS SYSTEM
C*** VIBRATION THEORY AND APPLICATIONS, THOMSON, 2ND PRINTING, PAGE 6, EX. 1.2-2
ANTYPE,MODAL
MODOPT,LANB,1
ET,1,COMBIN14,,,2     ! TWO-DIMENSIONAL LONGITUDINAL SPRING
ET,2,MASS21,,,4       ! TWO-DIMENSIONAL MASS
R,1,48                ! K = 48 LB/IN
R,2,.006477           ! MASS = WEIGHT/G = 2.5/386 = 0.00647 LB-S**2/IN
N,1
N,2,,1
E,1,2
TYPE,2
REAL,2
E,2
OUTPR,ALL,1
OUTRES,ALL,0
D,1,ALL
D,2,UX
FINISH
/SOLU
SOLVE
*GET,FREQ,MODE,1,FREQ
*DIM,LABEL,CHAR,1,2
*DIM,VALUE,,1,3
LABEL(1,1) = '      F,'
LABEL(1,2) = ' (Hz)   '
*VFILL,VALUE(1,1),DATA,13.701
*VFILL,VALUE(1,2),DATA,FREQ
*VFILL,VALUE(1,3),DATA,ABS(FREQ/13.701)
/COM
/OUT,vm45,vrt
/COM,------------------- VM45 RESULTS COMPARISON ---------------
/COM,
/COM,                 |   TARGET   |   Mechanical APDL   |   RATIO
/COM,
*VWRITE,LABEL(1,1),LABEL(1,2),VALUE(1,1),VALUE(1,2),VALUE(1,3)
(1X,A8,A8,'   ',F10.3,'  ',F14.3,'   ',1F15.3)
/COM,-----------------------------------------------------------
/OUT
FINISH
*LIST,vm45,vrt
