/COM,ANSYS MEDIA REL. 150 (11/8/2013) REF. VERIF. MANUAL: REL. 150
/VERIFY,VM23
/PREP7
/TITLE, VM23, THERMAL-STRUCTURAL CONTACT OF TWO BODIES
! DISPLACEMENTS AT NODE 1
/COM
/COM,  SOLVING USING PLANE13 ELEMENTS
/COM,
ET,1,PLANE13,4,,2
ET,2,CONTA175,1
ET,3,TARGE169
MP,EX,1,10E6
MP,KXX,1,250
MP,ALPX,1,12E-6
MP,PRXY,,0.3
R,2,,,-1000,-0.005
RMORE,,,,,,-100
RMORE,,100
RMORE
RMORE,0.01
!      SET UP FINITE ELEMENT MODEL
N,1
N,2,0.4
N,3,(0.4+0.0035)
N,4,(0.9+0.0035)
NGEN,2,4,1,4,1,,0.1
E,1,2,6,5                ! PLANE13 ELEMENTS
E,3,4,8,7
TYPE,2                   ! CONTACT ELEMENTS
REAL,2
E,2
E,6
TYPE,3                   ! TARGET ELEMENTS
REAL,2
NSEL,S,NODE,,3,7,4
ESLN
ESURF
ALLSEL
!      APPLY INITIAL BOUNDARY CONDITIONS
D,ALL,AZ
D,1,UY,,,4,1
D,1,UX,,,5,4
D,4,UX,,,8,4
TREF,100
FINISH
/SOLU
NLGEOM,ON
D,1,TEMP,500,,5,4
D,3,TEMP,100,,4
D,7,TEMP,100,,8
/OUT,SCRATCH
SOLVE
OUTRES,ALL,ALL
DDELE,3,TEMP,7,4
D,4,TEMP,850,,8,4
NSUBST,3
SOLVE
D,4,TEMP,100,,8,4
SOLVE
FINISH
/POST1
/OUT,
INRES,NSOL,MISC
SUBSET,2,2
ESEL,S,,,3,4
ETABLE,HEAT-FLO,SMISC,14 ! STORE HEAT FLOWS FOR CONTACT ELEMENTS
SSUM
*GET,HEAT_C1,SSUM,,ITEM,HEAT-FLO
NSEL,S,,,2,6,4
PRNSOL,TEMP
*GET,TEMP_C1,NODE,2,TEMP
APPEND,2,3
! LARGE DEFLECTION EFFECTS TURNED ON
! FIRST LOAD STEP
! STORE ALL DATA
! SECOND LOAD STEP
! THIRD LOAD STEP
! RETRIEVE NODAL AND MISCELLANEOUS DATA
! READ LOAD STEP 2, SUBSTEP 2 DATA
! APPEND (OVERWRITE IN THIS CASE) BY
!  LOAD STEP 2 AND SUBSTEP 3 DATA
ETABLE,REFL
SSUM
*GET,HEAT_C2,SSUM,,ITEM,HEAT-FLO
PRNSOL,TEMP
*GET,TEMP_C2,NODE,2,TEMP
SUBSET,3,3               ! READ LOAD STEP 3, SUBSTEP 3 DATA
ETABLE,REFL
PRETAB
*GET,TEMP_C3,ELEM,4,ETAB,HEAT-FLO
PRNSOL,TEMP
ALLSEL,ALL
*DIM,LABEL,CHAR,2,2
*DIM,LABEL_C3,CHAR,1,2
*DIM,VALUE_C1,,2,3
*DIM,VALUE_C2,,2,3
*DIM,VALUE_C3,,1,2
LABEL(1,1) = 'TEMP AT ','HEAT FLO'
LABEL(1,2) = 'EA2 (C) ','W (W)   '
LABEL_C3(1,1) = 'HEAT FLO'
LABEL_C3(1,2) = 'W (W)   '
*VFILL,VALUE_C1(1,1),DATA,539,2439
*VFILL,VALUE_C1(1,2),DATA,TEMP_C1,HEAT_C1
*VFILL,VALUE_C1(1,3),DATA,ABS(TEMP_C1/539  ) ,ABS( HEAT_C1/2439 )
*VFILL,VALUE_C2(1,1),DATA,636.6,8536.6
*VFILL,VALUE_C2(1,2),DATA,TEMP_C2,HEAT_C2
*VFILL,VALUE_C2(1,3),DATA,ABS(TEMP_C2/636.6 ) ,ABS( HEAT_C2/8536.6)
*VFILL,VALUE_C3(1,1),DATA,0
*VFILL,VALUE_C3(1,2),DATA,TEMP_C3
SAVE,TABLE_1
FINISH
/CLEAR,NOSTART
/COM,
/COM,  SOLVING USING PLANE233 ELEMENT WITH WEAK COUPLING BETWEEN U AND TEMP DOF
/COM,
/PREP7
ET,1,PLANE223,11,1
ET,2,CONTA175,1
ET,3,TARGE169
MP,EX,1,10E6
MP,KXX,1,250
MP,ALPX,1,12E-6
MP,PRXY,,0.3
R,2,,,-1000,-0.005
RMORE,,,,,,-100
RMORE,,100
RMORE
RMORE,0.01
!      SET UP FINITE ELEMENT MODEL
N,1
N,2,0.4
N,3,(0.4+0.0035)
N,4,(0.9+0.0035)
NGEN,2,4,1,4,1,,0.1
E,1,2,6,5                ! PLANE223 ELEMENTS
E,3,4,8,7
TYPE,2                   ! CONTACT ELEMENTS
REAL,2
E,2
E,6
TYPE,3                   ! TARGET ELEMENTS
REAL,2
NSEL,S,NODE,,3,7,4
ESLN
ESURF
ALLSEL
!      APPLY INITIAL BOUNDARY CONDITIONS
D,1,UY,,,4,1
D,1,UX,,,5,4
D,4,UX,,,8,4
TREF,100
FINISH
/SOLU
NLGEOM,ON
D,1,TEMP,500,,5,4
D,3,TEMP,100,,4
D,7,TEMP,100,,8
/OUT,SCRATCH
SOLVE
OUTRES,ALL,ALL
DDELE,3,TEMP,7,4
D,4,TEMP,850,,8,4
NSUBST,3
SOLVE
D,4,TEMP,100,,8,4
SOLVE
FINISH
! COUPLE-FIELD ELEMENT TYPE, WEAK COUPLING
! CONTACT ELEMENT TYPE
! TARGET ELEMENT TYPE
! YOUNG'S MODULUS
! CONDUCTIVITY
! THERMAL EXPANSION COEFFICIENT
! LARGE DEFLECTION EFFECTS TURNED ON
! FIRST LOAD STEP
! STORE ALL DATA
! SECOND LOAD STEP
! THIRD LOAD STEP
/POST1
/OUT,
INRES,NSOL,MISC
SUBSET,2,2
ESEL,S,,,3,4
ETABLE,HEAT-FLO,SMISC,14 ! STORE HEAT FLOWS FOR CONTACT ELEMENTS
SSUM
*GET,HEAT_C1B,SSUM,,ITEM,HEAT-FLO
NSEL,S,,,2,6,4
PRNSOL,TEMP
*GET,TEMP_C1B,NODE,2,TEMP
APPEND,2,3               ! APPEND (OVERWRITE IN THIS CASE) BY
                 !  LOAD STEP 2 AND SUBSTEP 3 DATA
ETABLE,REFL
SSUM
*GET,HEAT_C2B,SSUM,,ITEM,HEAT-FLO
PRNSOL,TEMP
*GET,TEMP_C2B,NODE,2,TEMP
SUBSET,3,3               ! READ LOAD STEP 3, SUBSTEP 3 DATA
ETABLE,REFL
PRETAB
*GET,TEMP_C3B,ELEM,4,ETAB,HEAT-FLO
PRNSOL,TEMP
ALLSEL,ALL
*DIM,LABEL,CHAR,2,2
*DIM,LABEL_C3,CHAR,1,2
*DIM,VALUE_C1,,2,3
*DIM,VALUE_C2,,2,3
*DIM,VALUE_C3,,1,2
LABEL(1,1) = 'TEMP AT ','HEAT FLO'
LABEL(1,2) = 'EA2 (C) ','W (W)   '
LABEL_C3(1,1) = 'HEAT FLO'
LABEL_C3(1,2) = 'W (W)   '
*VFILL,VALUE_C1(1,1),DATA,539,2439
*VFILL,VALUE_C1(1,2),DATA,TEMP_C1B,HEAT_C1B
*VFILL,VALUE_C1(1,3),DATA,ABS(TEMP_C1B/539  ) ,ABS( HEAT_C1B/2439 )
*VFILL,VALUE_C2(1,1),DATA,636.6,8536.6
*VFILL,VALUE_C2(1,2),DATA,TEMP_C2B,HEAT_C2B
*VFILL,VALUE_C2(1,3),DATA,ABS(TEMP_C2B/636.6 ) ,ABS( HEAT_C2B/8536.6)
*VFILL,VALUE_C3(1,1),DATA,0
*VFILL,VALUE_C3(1,2),DATA,TEMP_C3B
SAVE,TABLE_2
FINISH
RESUME,TABLE_1
/COM
/OUT,vm23,vrt
/COM,------------------- VM23 RESULTS COMPARISON ---------------------
/COM,
/COM,                 |   TARGET   |
/COM,
/COM,
/COM,  USING PLANE13 ELEMENTS
/COM,
/COM,TEMP AT EB2 = 600 C:
*VWRITE,LABEL(1,1),LABEL(1,2),VALUE_C1(1,1),VALUE_C1(1,2),VALUE_C1(1,3)
(1X,A8,A8,'   ',F10.1,'  ',F14.1,'   ',1F15.3)
/COM,
/COM,TEMP AT EB2 = 850 C:
*VWRITE,LABEL(1,1),LABEL(1,2),VALUE_C2(1,1),VALUE_C2(1,2),VALUE_C2(1,3)
(1X,A8,A8,'   ',F10.1,'  ',F14.1,'   ',1F15.3)
/COM,
/COM,TEMP AT EB2 = 100 C:
*VWRITE,LABEL_C3(1,1),LABEL_C3(1,2),VALUE_C3(1,1),VALUE_C3(1,2)
(1X,A8,A8,'   ',F10.1,'  ',F10.1)
/COM,
/COM,
/NOPR
RESUME,TABLE_2
/GOPR,
/COM,
/COM,
/COM,
/COM, USING PLANE233 ELEMENTS
/COM,
/COM,TEMP AT EB2 = 600 C:
*VWRITE,LABEL(1,1),LABEL(1,2),VALUE_C1(1,1),VALUE_C1(1,2),VALUE_C1(1,3)
(1X,A8,A8,'   ',F10.1,'  ',F14.1,'   ',1F15.3)
/COM,
/COM,TEMP AT EB2 = 850 C:
*VWRITE,LABEL(1,1),LABEL(1,2),VALUE_C2(1,1),VALUE_C2(1,2),VALUE_C2(1,3)
(1X,A8,A8,'   ',F10.1,'  ',F14.1,'   ',1F15.3)
/COM,
/COM,TEMP AT EB2 = 100 C:
*VWRITE,LABEL_C3(1,1),LABEL_C3(1,2),VALUE_C3(1,1),VALUE_C3(1,2)
(1X,A8,A8,'   ',F10.1,'  ',F10.1)
/COM,
/COM,-----------------------------------------------------------------
/OUT
FINISH
*LIST,vm23,vrt
/delete,TABLE_1
/delete,TABLE_2
